// COMSOL Multiphysics 6.4.0.293 model "Chladni_15x15_bound.mph"
// Outline of the model tree

Parameters
  wide = 150[mm]
  length = 150[mm]
  thickness = 2[mm]
  radius = 1.77[mm]
  grid_size = 15  // Optimisation grid size / 优化网格尺寸
  cell_size = wide/grid_size  // Nominal optimisation cell size / 名义优化单元尺寸
  h0101 = 2[mm]  // 15x15 thickness cell (1,1) / 15x15 厚度单元 (1,1)
  h0102 = 2[mm]  // 15x15 thickness cell (1,2) / 15x15 厚度单元 (1,2)
  h0103 = 2[mm]  // 15x15 thickness cell (1,3) / 15x15 厚度单元 (1,3)
  h0104 = 2[mm]  // 15x15 thickness cell (1,4) / 15x15 厚度单元 (1,4)
  h0105 = 2[mm]  // 15x15 thickness cell (1,5) / 15x15 厚度单元 (1,5)
  h0106 = 2[mm]  // 15x15 thickness cell (1,6) / 15x15 厚度单元 (1,6)
  h0107 = 2[mm]  // 15x15 thickness cell (1,7) / 15x15 厚度单元 (1,7)
  h0108 = 2[mm]  // 15x15 thickness cell (1,8) / 15x15 厚度单元 (1,8)
  h0109 = 2[mm]  // 15x15 thickness cell (1,9) / 15x15 厚度单元 (1,9)
  h0110 = 2[mm]  // 15x15 thickness cell (1,10) / 15x15 厚度单元 (1,10)
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  hcenter = 2[mm]  // Fixed centre physical thickness / 中心物理约束厚度
  mat_density = 1200[kg/m^3]
  mat_poisson_ratio = 0.35
  mat_youngs_modulus = 2.0e9[Pa]
  mat_thermal_conductivity = 0.18[W/(m*K)]
  mat_heat_capacity = 1200[J/(kg*K)]
  mat_thermal_expansion = 8.0e-5[1/K]

Geometry
  geom1 "几何 1" (3D, length unit m)
    wp1: WorkPlane "工作平面 1" | unite = on
      sq1: Square "正方形 1" | size = 0.15; base = center
      c1: Circle "孔 1" | r = 0.00177
      c2: Circle "垫片" | type = curve; r = 0.00433
      dif1: Difference "差集 1" | input = sq1; input2 = c1
      pol1: Polygon "多边形 1" | type = open; source = table; table = {{-0.065, 0.08}, {-0.065, -0.08}}
      arr1: Array "阵列 1"
        input = pol1
        size = {14, 1}
        fullsize = {14, 1}
        displ = {0.01, 0}
        indexattrtag = arr1.index
        indexattrtags = {arr1.index1, arr1.index2}
      pol2: Polygon "多边形 2" | type = open; source = table; table = {{-0.08, -0.065}, {0.08, -0.065}}
      arr2: Array "阵列 2"
        input = pol2
        size = {1, 14}
        fullsize = {1, 14}
        displ = {0, 0.01}
        indexattrtag = arr2.index
        indexattrtags = {arr2.index1, arr2.index2}
    fin: Finalize "形成联合体"

Materials
  mat1: Common "Grey Resin" on all boundaries
    def: def "基本"
      density = mat_density
      youngsmodulus = mat_youngs_modulus
      poissonsratio = mat_poisson_ratio
      thermalconductivity = mat_thermal_conductivity
      heatcapacity = mat_heat_capacity
      thermalexpansioncoefficient = mat_thermal_expansion
    Enu: Enu "杨氏模量和泊松比"
      E = 2.4e9
      nu = 0.38

Physics
  shell: Shell "壳" on all boundaries
    dependent variable u2 = {u2, v2, w2}
    emm1: Elastic "线弹性材料 1" (default)
      shls1: ShellLocalSystem "壳局部坐标系 1" (default)
    to1: ThicknessOffset "整体厚度" (default)
      d = if(y>=0.065,if(x<=-0.065,h0101,if(x<=-0.055,h0102,if(x<=-0.045,h0103,if(x<=-0.035,h0104,if(x<=-0.025,h0105,if(x<=-0.015,h0106,if(x<=-0.005,h0107,if(x<=0.005,h0108,if(x<=0.015,h0109,if(x<=0.025,h0110,if(x<=0.035,h0111,if(x<=0.045,h0112,if(x<=0.055,h0113,if(x<=0.065,h0114,h0115)))))))))))))),if(y>=0.055,if(x<=-0.065,h0201,if(x<=-0.055,h0202,if(x<=-0.045,h0203,if(x<=-0.035,h0204,if(x<=-0.025,h0205,if(x<=-0.015,h0206,if(x<=-0.005,h0207,if(x<=0.005,h0208,if(x<=0.015,h0209,if(x<=0.025,h0210,if(x<=0.035,h0211,if(x<=0.045,h0212,if(x<=0.055,h0213,if(x<=0.065,h0214,h0215)))))))))))))),if(y>=0.045,if(x<=-0.065,h0301,if(x<=-0.055,h0302,if(x<=-0.045,h0303,if(x<=-0.035,h0304,if(x<=-0.025,h0305,if(x<=-0.015,h0306,if(x<=-0.005,h0307,if(x<=0.005,h0308,if(x<=0.015,h0309,if(x<=0.025,h0310,if(x<=0.035,h0311,if(x<=0.045,h0312,if(x<=0.055,h0313,if(x<=0.065,h0314,h0315)))))))))))))),if(y>=0.035,if(x<=-0.065,h0401,if(x<=-0.055,h0402,if(x<=-0.045,h0403,if(x<=-0.035,h0404,if(x<=-0.025,h0405,if(x<=-0.015,h0406,if(x<=-0.005,h0407,if(x<=0.005,h0408,if(x<=0.015,h0409,if(x<=0.025,h0410,if(x<=0.035,h0411,if(x<=0.045,h0412,if(x<=0.055,h0413,if(x<=0.065,h0414,h0415)))))))))))))),if(y>=0.025,if(x<=-0.065,h0501,if(x<=-0.055,h0502,if(x<=-0.045,h0503,if(x<=-0.035,h0504,if(x<=-0.025,h0505,if(x<=-0.015,h0506,if(x<=-0.005,h0507,if(x<=0.005,h0508,if(x<=0.015,h0509,if(x<=0.025,h0510,if(x<=0.035,h0511,if(x<=0.045,h0512,if(x<=0.055,h0513,if(x<=0.065,h0514,h0515)))))))))))))),if(y>=0.015,if(x<=-0.065,h0601,if(x<=-0.055,h0602,if(x<=-0.045,h0603,if(x<=-0.035,h0604,if(x<=-0.025,h0605,if(x<=-0.015,h0606,if(x<=-0.005,h0607,if(x<=0.005,h0608,if(x<=0.015,h0609,if(x<=0.025,h0610,if(x<=0.035,h0611,if(x<=0.045,h0612,if(x<=0.055,h0613,if(x<=0.065,h0614,h0615)))))))))))))),if(y>=0.005,if(x<=-0.065,h0701,if(x<=-0.055,h0702,if(x<=-0.045,h0703,if(x<=-0.035,h0704,if(x<=-0.025,h0705,if(x<=-0.015,h0706,if(x<=-0.005,h0707,if(x<=0.005,h0708,if(x<=0.015,h0709,if(x<=0.025,h0710,if(x<=0.035,h0711,if(x<=0.045,h0712,if(x<=0.055,h0713,if(x<=0.065,h0714,h0715)))))))))))))),if(y>=-0.005,if(x<=-0.065,h0801,if(x<=-0.055,h0802,if(x<=-0.045,h0803,if(x<=-0.035,h0804,if(x<=-0.025,h0805,if(x<=-0.015,h0806,if(x<=-0.005,h0807,if(x<=0.005,h0808,if(x<=0.015,h0809,if(x<=0.025,h0810,if(x<=0.035,h0811,if(x<=0.045,h0812,if(x<=0.055,h0813,if(x<=0.065,h0814,h0815)))))))))))))),if(y>=-0.015,if(x<=-0.065,h0901,if(x<=-0.055,h0902,if(x<=-0.045,h0903,if(x<=-0.035,h0904,if(x<=-0.025,h0905,if(x<=-0.015,h0906,if(x<=-0.005,h0907,if(x<=0.005,h0908,if(x<=0.015,h0909,if(x<=0.025,h0910,if(x<=0.035,h0911,if(x<=0.045,h0912,if(x<=0.055,h0913,if(x<=0.065,h0914,h0915)))))))))))))),if(y>=-0.025,if(x<=-0.065,h1001,if(x<=-0.055,h1002,if(x<=-0.045,h1003,if(x<=-0.035,h1004,if(x<=-0.025,h1005,if(x<=-0.015,h1006,if(x<=-0.005,h1007,if(x<=0.005,h1008,if(x<=0.015,h1009,if(x<=0.025,h1010,if(x<=0.035,h1011,if(x<=0.045,h1012,if(x<=0.055,h1013,if(x<=0.065,h1014,h1015)))))))))))))),if(y>=-0.035,if(x<=-0.065,h1101,if(x<=-0.055,h1102,if(x<=-0.045,h1103,if(x<=-0.035,h110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
      OffsetDefinition = bottom
    free1: Free "自由 1" (default)
    init1: init "初始值 1" (default)
    fix1: Fixed "固定约束 1" on edges 277, 278, 281, 284

Mesh
  mesh1 "网格 1" (physics-controlled)

Studies
  std1 "研究 1"
    eig: Eigenfrequency "特征频率" | neigs = 10; shift = 1[Hz]; filtereigdescription = Damped natural frequency

Solver configurations
  sol1 "解 1" (study std1)
    v1: Variables "因变量 1"
    e1: Eigenvalue "特征值求解器 1"
      dDef: Direct "直接"

Datasets
  dset1: Solution | solution = sol1
  dset1shellshl: Shell "壳"
    data = dset1
    seplevels = off
    resolution = 2
    orientationexpr = {shell.nlX, shell.nlY, shell.nlZ}
    displacementexpr = {arx, ary, arz}
    distanceexpr = shell.z_pos
    areascalefactor = shell.ASF
    linescalefactor = shell.LSF

Derived values
  pev1: EvalPoint "点计算 1" on points 41, 109, 113, 115 | data = dset1; table = tbl1; expr = shell.disp

Evaluation groups
  std1EvgFrq: EvaluationGroup "特征频率 (研究 1)" | data = dset1
    gev1: EvalGlobal "全局计算 1"
      expr = {2*pi*freq, imag(freq)/abs(freq), abs(freq)/imag(freq)/2}
      unit = {rad/s, 1, 1}
      descr = {角频率, 阻尼比, 品质因子}

Plots
  pg1: PlotGroup3D "振型 (shell)" | data = dset1shellshl
    surf1: Surface "表面 1" | expr = shell.disp
      def: Deform "变形" | expr = {shell.u, shell.v, shell.w}