// COMSOL Multiphysics 6.4.0.293 model "Chladni_15x15_parameterized.mph"
// Outline of the model tree

Parameters
  wide = 150[mm]
  length = 150[mm]
  thickness = 2[mm]
  radius = 1.77[mm]
  grid_size = 15  // Optimisation grid size / 优化网格尺寸
  cell_size = wide/grid_size  // Nominal optimisation cell size / 名义优化单元尺寸
  h0101 = 2[mm]  // 15x15 thickness cell (1,1) / 15x15 厚度单元 (1,1)
  h0102 = 2[mm]  // 15x15 thickness cell (1,2) / 15x15 厚度单元 (1,2)
  h0103 = 2[mm]  // 15x15 thickness cell (1,3) / 15x15 厚度单元 (1,3)
  h0104 = 2[mm]  // 15x15 thickness cell (1,4) / 15x15 厚度单元 (1,4)
  h0105 = 2[mm]  // 15x15 thickness cell (1,5) / 15x15 厚度单元 (1,5)
  h0106 = 2[mm]  // 15x15 thickness cell (1,6) / 15x15 厚度单元 (1,6)
  h0107 = 2[mm]  // 15x15 thickness cell (1,7) / 15x15 厚度单元 (1,7)
  h0108 = 2[mm]  // 15x15 thickness cell (1,8) / 15x15 厚度单元 (1,8)
  h0109 = 2[mm]  // 15x15 thickness cell (1,9) / 15x15 厚度单元 (1,9)
  h0110 = 2[mm]  // 15x15 thickness cell (1,10) / 15x15 厚度单元 (1,10)
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  hcenter = 2[mm]  // Fixed centre physical thickness / 中心物理约束厚度

Geometry
  geom1 "几何 1" (3D, length unit m)
    wp1: WorkPlane "工作平面 1" | unite = on
      sq1: Square "正方形 1" | size = 0.15; base = center
      c1: Circle "孔 1" | r = 0.00177
      c2: Circle "垫片" | type = curve; r = 0.00433
      dif1: Difference "差集 1" | input = sq1; input2 = c1
      pol1: Polygon "多边形 1" | type = open; source = table; table = {{-0.06, 0.08}, {-0.06, -0.08}}
      arr1: Array "阵列 1"
        input = pol1
        size = {9, 1}
        fullsize = {9, 1}
        displ = {0.015, 0}
        indexattrtag = arr1.index
        indexattrtags = {arr1.index1, arr1.index2}
      pol2: Polygon "多边形 2" | type = open; source = table; table = {{-0.08, -0.06}, {0.08, -0.06}}
      arr2: Array "阵列 2"
        input = pol2
        size = {1, 9}
        fullsize = {1, 9}
        displ = {0, 0.015}
        indexattrtag = arr2.index
        indexattrtags = {arr2.index1, arr2.index2}
    fin: Finalize "形成联合体"

Materials
  mat1: Common "Grey Resin" on all boundaries
    def: def "基本"
      density = 1180
    Enu: Enu "杨氏模量和泊松比"
      E = 2.4e9
      nu = 0.38

Physics
  shell: Shell "壳" on all boundaries
    dependent variable u2 = {u2, v2, w2}
    emm1: Elastic "线弹性材料 1" (default)
      shls1: ShellLocalSystem "壳局部坐标系 1" (default)
    to1: ThicknessOffset "整体厚度" (default) | d = 0.002[m]; OffsetDefinition = bottom
    free1: Free "自由 1" (default)
    init1: init "初始值 1" (default)
    to2: ThicknessOffset "厚度和偏移 2" on boundaries 1, 9, 14, 21, 26, 27, 29, 34, 50, 56, 65, 70, 83, 86, 90, 98, 103
      d = 0.001[m]
      OffsetDefinition = bottom
    to3: ThicknessOffset "厚度和偏移 3" on boundaries 12, 16, 35, 42, 48, 67, 74, 81 | d = 0.0013[m]; OffsetDefinition = bottom
    to4: ThicknessOffset "厚度和偏移 4" on boundaries 5, 28, 41, 45, 51, 61, 88, 93, 101
      d = 0.0008[m]
      OffsetDefinition = bottom
    to5: ThicknessOffset "厚度和偏移 5" on boundaries 3, 8, 23, 36, 57, 58, 62, 66, 78, 85, 92
      d = 0.0018[m]
      OffsetDefinition = bottom
    to6: ThicknessOffset "厚度和偏移 6" on boundaries 7, 11, 18, 30, 37, 43, 49, 54, 69, 72, 96
      d = 0.0009[m]
      OffsetDefinition = bottom
    to7: ThicknessOffset "厚度和偏移 7" on boundaries 10, 13, 15, 32, 38, 46, 52, 63, 75, 77, 82, 89, 94, 97
      d = 0.0006[m]
      OffsetDefinition = bottom
    to8: ThicknessOffset "厚度和偏移 8" on boundaries 4, 19, 25, 40, 44, 47, 53, 68, 80, 84, 95, 102
      d = 0.0014
      OffsetDefinition = bottom
    fix1: Fixed "固定约束 1" on edges 124, 125, 141, 149

Mesh
  mesh1 "网格 1" (physics-controlled)

Studies
  std1 "研究 1"
    eig: Eigenfrequency "特征频率" | neigs = 10; shift = 1[Hz]; filtereigdescription = Damped natural frequency

Solver configurations
  sol1 "解 1" (study std1)
    v1: Variables "因变量 1"
    e1: Eigenvalue "特征值求解器 1"
      dDef: Direct "直接"

Datasets
  dset1: Solution | solution = sol1
  dset1shellshl: Shell "壳"
    data = dset1
    seplevels = off
    resolution = 2
    orientationexpr = {shell.nlX, shell.nlY, shell.nlZ}
    displacementexpr = {arx, ary, arz}
    distanceexpr = shell.z_pos
    areascalefactor = shell.ASF
    linescalefactor = shell.LSF

Derived values
  pev1: EvalPoint "点计算 1" on points 41, 109, 113, 115 | data = dset1; table = tbl1; expr = shell.disp

Evaluation groups
  std1EvgFrq: EvaluationGroup "特征频率 (研究 1)" | data = dset1
    gev1: EvalGlobal "全局计算 1"
      expr = {2*pi*freq, imag(freq)/abs(freq), abs(freq)/imag(freq)/2}
      unit = {rad/s, 1, 1}
      descr = {角频率, 阻尼比, 品质因子}

Plots
  pg1: PlotGroup3D "振型 (shell)" | data = dset1shellshl
    surf1: Surface "表面 1" | expr = shell.disp
      def: Deform "变形" | expr = {shell.u, shell.v, shell.w}