// COMSOL Multiphysics 6.4.0.293 model "Chladni_9x9_bound.mph"
// Outline of the model tree

Parameters
  wide = 150[mm]
  length = 150[mm]
  thickness = 2[mm]
  radius = 1.77[mm]
  grid_size = 9  // Optimisation grid size / 优化网格尺寸
  cell_size = wide/grid_size  // Nominal optimisation cell size / 名义优化单元尺寸
  h0101 = 2[mm]  // 9x9 thickness cell (1,1) / 9x9 厚度单元 (1,1)
  h0102 = 2[mm]  // 9x9 thickness cell (1,2) / 9x9 厚度单元 (1,2)
  h0103 = 2[mm]  // 9x9 thickness cell (1,3) / 9x9 厚度单元 (1,3)
  h0104 = 2[mm]  // 9x9 thickness cell (1,4) / 9x9 厚度单元 (1,4)
  h0105 = 2[mm]  // 9x9 thickness cell (1,5) / 9x9 厚度单元 (1,5)
  h0106 = 2[mm]  // 9x9 thickness cell (1,6) / 9x9 厚度单元 (1,6)
  h0107 = 2[mm]  // 9x9 thickness cell (1,7) / 9x9 厚度单元 (1,7)
  h0108 = 2[mm]  // 9x9 thickness cell (1,8) / 9x9 厚度单元 (1,8)
  h0109 = 2[mm]  // 9x9 thickness cell (1,9) / 9x9 厚度单元 (1,9)
  h0201 = 2[mm]  // 9x9 thickness cell (2,1) / 9x9 厚度单元 (2,1)
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  hcenter = 2[mm]  // Fixed centre physical thickness / 中心物理约束厚度

Geometry
  geom1 "几何 1" (3D, length unit m)
    wp1: WorkPlane "工作平面 1" | unite = on
      sq1: Square "正方形 1" | size = 0.15; base = center
      c1: Circle "孔 1" | r = 0.00177
      c2: Circle "垫片" | type = curve; r = 0.00433
      dif1: Difference "差集 1" | input = sq1; input2 = c1
      pol1: Polygon "多边形 1" | type = open; source = table; table = {{-0.0583333333333, 0.08}, {-0.0583333333333, -0.08}}
      arr1: Array "阵列 1"
        input = pol1
        size = {8, 1}
        fullsize = {8, 1}
        displ = {0.0166666666667, 0}
        indexattrtag = arr1.index
        indexattrtags = {arr1.index1, arr1.index2}
      pol2: Polygon "多边形 2" | type = open; source = table; table = {{-0.08, -0.0583333333333}, {0.08, -0.0583333333333}}
      arr2: Array "阵列 2"
        input = pol2
        size = {1, 8}
        fullsize = {1, 8}
        displ = {0, 0.0166666666667}
        indexattrtag = arr2.index
        indexattrtags = {arr2.index1, arr2.index2}
    fin: Finalize "形成联合体"

Materials
  mat1: Common "Grey Resin" on all boundaries
    def: def "基本"
      density = 1180
    Enu: Enu "杨氏模量和泊松比"
      E = 2.4e9
      nu = 0.38

Physics
  shell: Shell "壳" on all boundaries
    dependent variable u2 = {u2, v2, w2}
    emm1: Elastic "线弹性材料 1" (default)
      shls1: ShellLocalSystem "壳局部坐标系 1" (default)
    to1: ThicknessOffset "整体厚度" (default)
      d = if(y>=0.0583333333333,if(x<=-0.0583333333333,h0101,if(x<=-0.0416666666667,h0102,if(x<=-0.025,h0103,if(x<=-0.00833333333333,h0104,if(x<=0.00833333333333,h0105,if(x<=0.025,h0106,if(x<=0.0416666666667,h0107,if(x<=0.0583333333333,h0108,h0109)))))))),if(y>=0.0416666666667,if(x<=-0.0583333333333,h0201,if(x<=-0.0416666666667,h0202,if(x<=-0.025,h0203,if(x<=-0.00833333333333,h0204,if(x<=0.00833333333333,h0205,if(x<=0.025,h0206,if(x<=0.0416666666667,h0207,if(x<=0.0583333333333,h0208,h0209)))))))),if(y>=0.025,if(x<=-0.0583333333333,h0301,if(x<=-0.0416666666667,h0302,if(x<=-0.025,h0303,if(x<=-0.00833333333333,h0304,if(x<=0.00833333333333,h0305,if(x<=0.025,h0306,if(x<=0.0416666666667,h0307,if(x<=0.0583333333333,h0308,h0309)))))))),if(y>=0.00833333333333,if(x<=-0.0583333333333,h0401,if(x<=-0.0416666666667,h0402,if(x<=-0.025,h0403,if(x<=-0.00833333333333,h0404,if(x<=0.00833333333333,h0405,if(x<=0.025,h0406,if(x<=0.0416666666667,h0407,if(x<=0.0583333333333,h0408,h0409)))))))),if(y>=-0.00833333333333,if(x<=-0.0583333333333,h0501,if(x<=-0.0416666666667,h0502,if(x<=-0.025,h0503,if(x<=-0.00833333333333,h0504,if(x<=0.00833333333333,h0505,if(x<=0.025,h0506,if(x<=0.0416666666667,h0507,if(x<=0.0583333333333,h0508,h0509)))))))),if(y>=-0.025,if(x<=-0.0583333333333,h0601,if(x<=-0.0416666666667,h0602,if(x<=-0.025,h0603,if(x<=-0.00833333333333,h0604,if(x<=0.00833333333333,h0605,if(x<=0.025,h0606,if(x<=0.0416666666667,h0607,if(x<=0.0583333333333,h0608,h0609)))))))),if(y>=-0.0416666666667,if(x<=-0.0583333333333,h0701,if(x<=-0.0416666666667,h0702,if(x<=-0.025,h0703,if(x<=-0.00833333333333,h0704,if(x<=0.00833333333333,h0705,if(x<=0.025,h0706,if(x<=0.0416666666667,h0707,if(x<=0.0583333333333,h0708,h0709)))))))),if(y>=-0.0583333333333,if(x<=-0.0583333333333,h0801,if(x<=-0.0416666666667,h0802,if(x<=-0.025,h0803,if(x<=-0.00833333333333,h0804,if(x<=0.00833333333333,h0805,if(x<=0.025,h0806,if(x<=0.0416666666667,h0807,if(x<=0.0583333333333,h0808,h0809)))))))),if(x<=-0.0583333333333,h0901,if(x<=-0.0416666666667,h0902,if(x<=-0.025,h0903,if(x<=-0.00833333333333,h0904,if(x<=0.00833333333333,h0905,if(x<=0.025,h0906,if(x<=0.0416666666667,h0907,if(x<=0.0583333333333,h0908,h0909))))))))))))))))
      OffsetDefinition = bottom
    free1: Free "自由 1" (default)
    init1: init "初始值 1" (default)
    fix1: Fixed "固定约束 1" on edges 112, 113, 116, 119

Mesh
  mesh1 "网格 1" (physics-controlled)

Studies
  std1 "研究 1"
    eig: Eigenfrequency "特征频率" | neigs = 10; shift = 1[Hz]; filtereigdescription = Damped natural frequency

Solver configurations
  sol1 "解 1" (study std1)
    v1: Variables "因变量 1"
    e1: Eigenvalue "特征值求解器 1"
      dDef: Direct "直接"

Datasets
  dset1: Solution | solution = sol1
  dset1shellshl: Shell "壳"
    data = dset1
    seplevels = off
    resolution = 2
    orientationexpr = {shell.nlX, shell.nlY, shell.nlZ}
    displacementexpr = {arx, ary, arz}
    distanceexpr = shell.z_pos
    areascalefactor = shell.ASF
    linescalefactor = shell.LSF

Derived values
  pev1: EvalPoint "点计算 1" on points 41, 109, 113, 115 | data = dset1; table = tbl1; expr = shell.disp

Evaluation groups
  std1EvgFrq: EvaluationGroup "特征频率 (研究 1)" | data = dset1
    gev1: EvalGlobal "全局计算 1"
      expr = {2*pi*freq, imag(freq)/abs(freq), abs(freq)/imag(freq)/2}
      unit = {rad/s, 1, 1}
      descr = {角频率, 阻尼比, 品质因子}

Plots
  pg1: PlotGroup3D "振型 (shell)" | data = dset1shellshl
    surf1: Surface "表面 1" | expr = shell.disp
      def: Deform "变形" | expr = {shell.u, shell.v, shell.w}